<?xml version="1.0"?>
<?xml-stylesheet type="text/xsl" href="http://jsbsim.sourceforge.net/JSBSim.xsl"?>

<fdm_config name="PC-9M" version="2.0" release="ALPHA"
   xmlns:xsi="http://www.w3.org/2001/XMLSchema-instance"
   xsi:noNamespaceSchemaLocation="http://jsbsim.sourceforge.net/JSBSim.xsd">

 <fileheader>
  <author> Erik Hofman, David Culp </author>
  <filecreationdate> 24 Feb 2022 </filecreationdate>
  <description> Models a Pilatus PC-9M. </description>
 </fileheader>

<!--
  File:     PC-9M.xml
  Inputs:
    name:          PC-9M
    type:          Single engine WWII Fighter, Military Trainer, Aerobatic, Air Racer
    stall speed:   77.21kts
    max weight:    7056.00 lb
    length:        33.27 ft
    wing:
     span:         33.22 ft
     area:         175.34 sq-ft
     mean chord:   4.77 ft
     aspect ratio: 6.29:1
     taper ratio:  0.75:1
     incidence:    1.00 degrees
     dihedral:     7.00 degrees
     sweep:        1.00 degrees

    no. engines:   1
    engine type:   Turboprop Engine
    engine layout: forward fuselage

    gear type:     tricycle
    steering type: steering
    retractable?:  yes

  Outputs:
    wing loading:       40.24 lb/sq-ft
     - thickness ratio: 6.86%
    payload:            2391.54 lbs
    CL-alpha:           5.18 per radian
    CL-0:               0.44
    CL-max:             1.99
    CD-0:               0.01
    K:                  0.06
    Mcrit:              0.75

    min. turn radius    291.42 ft
    max. turn rate:     0.49 deg/s

    References:

    N. van Bronswijk., A.D. Snowden, H.A. Keating. and G.J. Brian
    "A Correlation between Flight-determined Longitudinal and Lateral
     Derivatives and Wind Tunnel Data for the Pilatus PC 9/A Training
     Aircraft in Approach and Departure Congurations"
    https://apps.dtic.mil/sti/citations/ADA387483

    Hilary A. Keating, Nick van Bronswijk, Andrew D. Snowden and Jan S. Drobik
    "A Correlation between Flight-determined Lateral Derivatives and Ground-
     based Data for the Pilatus PC 9/A Training Aircraft in Cruise
     Configuration"
    https://apps.dtic.mil/sti/citations/ADA381432
-->

 <metrics>
   <wingarea  unit="M2">     16.29 </wingarea>
   <wingspan  unit="M" >     10.124 </wingspan>
   <wing_incidence>           1.00 </wing_incidence>
   <chord     unit="M" >      1.65 </chord>
   <htailarea unit="M2">      2.77 </htailarea>
   <htailarm  unit="M" >      5.97 </htailarm>
   <vtailarea unit="M2">      1.63 </vtailarea>
   <vtailarm  unit="M" >      5.97 </vtailarm>
   <location name="AERORP" unit="M">
     <x>     0.252 </x>
     <y>     0.000 </y>
     <z>     0.000 </z>
   </location>
   <location name="EYEPOINT" unit="M">
     <x>    -0.965</x>
     <y>     0.000 </y>
     <z>     1.269 </z>
   </location>
   <location name="VRP" unit="M">
     <x>     0.000 </x>
     <y>     0.000 </y>
     <z>     0.475 </z>
   </location>
 </metrics>

 <mass_balance>
   <ixx unit="KG*M2">    2505.9 </ixx>
   <iyy unit="KG*M2">    6522.2 </iyy>
   <izz unit="KG*M2">    8467.1 </izz>
   <ixy unit="KG*M2">      49.0 </ixy>
   <ixz unit="KG*M2">     169.9 </ixz>
   <iyz unit="KG*M2">       3.0 </iyz>
   <emptywt unit="KG" >  1866.1 </emptywt>
   <location name="CG" unit="M">
     <x>     0.00 </x>
     <y>     0.00 </y>
     <z>     0.00 </z>
   </location>
   <pointmass name="Student">
     <weight unit="KG"> 80.0 </weight>
     <location name="POINTMASS" unit="M">
       <x>    -0.66 </x>
       <y>     0.0  </y>
       <z>     0.8  </z>
     </location>
   </pointmass>
   <pointmass name="Instructor">
     <weight unit="KG"> 80.0 </weight>
     <location name="POINTMASS" unit="M">
       <x>     1.27 </x>
       <y>     0.0  </y>
       <z>     0.86 </z>
     </location>
   </pointmass>
   <pointmass name="Turbine Engine">
     <weight unit="KG"> 150.0 </weight>
     <location name="POINTMASS" unit="M">
       <x>    -2.75 </x>
       <y>     0.0  </y>
       <z>     0.8  </z>
     </location>
   </pointmass>
   <pointmass name="Payload">
     <description> 1050 KG should bring model up to entered max weight </description>
     <weight unit="KG"> 850.0 </weight>
     <location name="POINTMASS" unit="M">
       <x>    -1.0  </x>
       <y>     0.0  </y>
       <z>     0.0  </z>
     </location>
   </pointmass>
 </mass_balance>

 <propulsion>

  <!-- Configuration for the PC-9M variant -->
  <engine file="PT6A-62">
    <feed> 0 </feed>
    <feed> 1 </feed>

    <thruster file="Propeller-4blade">
     <sense> 1 </sense>
     <location unit="M">
       <x>    -3.80 </x>
       <y>     0.00 </y>
       <z>     0.25 </z>
     </location>
     <orient unit="DEG">
       <pitch>     0.00 </pitch>
        <roll>     0.00 </roll>
         <yaw>     0.00 </yaw>
     </orient>
    </thruster>
  </engine>

  <!-- The PT6A generates extra turbine thrust through it's exhaust -->
  <engine file="PT6A-exhaust">
    <feed> 0 </feed>
    <feed> 1 </feed>

    <thruster file="direct">
     <sense> 1 </sense>
     <location unit="M">
      <x>    -3.80 </x>
      <y>     0.00 </y>
      <z>     0.25 </z>
     </location>
     <orient unit="DEG">
       <pitch>     0.00 </pitch>
        <roll>     0.00 </roll>
         <yaw>     0.00 </yaw>
     </orient>
    </thruster>
  </engine>

  <!-- Configuration for the PC-7 variant
  <engine file="PT6A-25C">
    <feed> 0 </feed>
    <feed> 1 </feed>

    <thruster file="Propeller-3blade">
     <sense> 1 </sense>
     <location unit="M">
       <x>    -3.80 </x>
       <y>     0.00 </y>
       <z>     0.25 </z>
     </location>
     <orient unit="DEG">
       <pitch>     0.00 </pitch>
        <roll>     0.00 </roll>
         <yaw>     0.00 </yaw>
     </orient>
    </thruster>
  </engine>
-->

  <!-- Configuration for the PC-21 variant
  <engine file="PT6A-68B">
    <feed> 0 </feed>
    <feed> 1 </feed>

    <thruster file="Propeller-5blade">
     <sense> 1 </sense>
     <location unit="M">
       <x>    -3.80 </x>
       <y>     0.00 </y>
       <z>     0.25 </z>
     </location>
     <orient unit="DEG">
       <pitch>     0.00 </pitch>
        <roll>     0.00 </roll>
         <yaw>     0.00 </yaw>
     </orient>
    </thruster>
  </engine>
-->

  <tank type="FUEL" number="0">
     <location unit="M">
       <x>     0.00 </x>
       <y>    -1.00 </y>
       <z>     0.00 </z>
     </location>
     <capacity unit="KG"> 237.5 </capacity>
     <contents unit="KG"> 175.0 </contents>
  </tank>
  <tank type="FUEL" number="1">
     <location unit="M">
       <x>     0.00 </x>
       <y>     1.00 </y>
       <z>     0.00 </z>
     </location>
     <capacity unit="KG"> 237.5 </capacity>
     <contents unit="KG"> 175.0 </contents>
  </tank>
 </propulsion>

 <system file="Conventional Controls.xml"/>
 <system file="Landing Gear.xml"/>
 <system file="Speedbrake.xml"/>
 <system file="Flaps.xml"/>
 <system file="nws"/>
 <system file="particles"/>
 <system file="canopy"/>

 <flight_control name="FCS: PC-9M"/>

 <ground_reactions file="Systems/GroundReactions.xml"/>
 <aerodynamics file="Systems/Aerodynamics.xml"/>
 <external_reactions file="Systems/ExternalReactions.xml"/>

</fdm_config>
