<?xml version="1.0"?>
<aerodynamics>
  <function name="aero/function/kCDge">
    <description>Change_in_drag_due_to_ground_effect</description>
    <table>
      <independentVar>aero/h_b-mac-ft</independentVar>
      <tableData>
          0.0000        0.4800
          0.1000        0.5150
          0.1500        0.6290
          0.2000        0.7090
          0.3000        0.8150
          0.4000        0.8820
          0.5000        0.9280
          0.6000        0.9620
          0.7000        0.9880
          0.8000        1.0000
          0.9000        1.0000
          1.0000        1.0000
          1.1000        1.0000
      </tableData>
    </table>
  </function>

  <function name="aero/function/kCLge">
    <description>Change_in_lift_due_to_ground_effect</description>
    <table>
      <independentVar>aero/h_b-mac-ft</independentVar>
      <tableData>
          0.0000        1.2030
          0.1000        1.1270
          0.1500        1.0900
          0.2000        1.0730
          0.3000        1.0460
          0.4000        1.0550
          0.5000        1.0190
          0.6000        1.0130
          0.7000        1.0080
          0.8000        1.0060
          0.9000        1.0030
          1.0000        1.0020
          1.1000        1.0000
      </tableData>
    </table>
  </function>

  <function name="aero/function/vel-propwash-fps">
    <description>Propeller induced velocity</description>
    <sum>
      <property>/engines/active-engine/prop-induced-velocity_fps</property>
      <property>/engines/active-engine/prop-induced-velocity_fps</property>
    </sum>
  </function>

  <function name="aero/function/qbar-propwash-psf">
    <description>q bar due to the propeller induced velocity</description>
    <product>
      <property>aero/function/vel-propwash-fps</property>
      <property>aero/function/vel-propwash-fps</property>
      <property>atmosphere/rho-slugs_ft3</property>
      <value>0.5</value>
    </product>
  </function>

  <function name="aero/function/velocity-induced-fps">
    <description>Velocity including the propulsion induced velocity</description>
    <sum>
      <property>velocities/u-aero-fps</property>
      <property>/engines/active-engine/prop-induced-velocity_fps</property>
<!--
      <property>/engines/active-engine[2]/prop-induced-velocity_fps</property>
      <property>/engines/active-engine[3]/prop-induced-velocity_fps</property>
-->
    </sum>
  </function>

  <function name="aero/function/qbar-induced-psf">
    <description>q bar including the propulsion induced velocity</description>
    <product>
      <property>aero/function/velocity-induced-fps</property>
      <property>aero/function/velocity-induced-fps</property>
      <property>atmosphere/rho-slugs_ft3</property>
      <value>0.5</value>
    </product>
  </function>

  <axis name="LIFT">
    <function name="aero/force/Lift_propwash">
      <description>Delta lift due to propeller induced velocity</description>
      <product>
         <property>/engines/active-engine/thrust-coefficient</property>
          <property>aero/qbar-psf</property>
          <property>metrics/Sw-sqft</property>
          <property>aero/function/kCLge</property>
          <table>
            <independentVar lookup="row">aero/alpha-rad</independentVar>
            <independentVar lookup="column">fcs/flap-pos-deg</independentVar>
            <tableData>
                     0.0     60.0
              -0.86  0.000   0.000
               0.00  0.295   0.788
               0.34  1.342   3.579
               0.69  0.000   0.000
            </tableData>
          </table>
      </product>
    </function>

    <function name="aero/force/Lift_alpha">
      <description>Lift due to alpha</description>
      <product>
          <property>aero/qbar-psf</property>
          <property>metrics/Sw-sqft</property>
          <table>
            <independentVar lookup="row">aero/alpha-rad</independentVar>
            <tableData>
              -1.57  0.0000
              -1.22 -0.5987
              -1.05 -0.8066
              -0.88 -0.9314
              -0.30 -0.3585
               0.00  0.4389
               0.30  1.9937
               0.60  1.0608
               0.88  1.0686
               1.05  0.9254
               1.22  0.6869
               1.57  0.0000
            </tableData>
          </table>
      </product>
    </function>

    <function name="aero/force/Lift_pitch_rate">
        <description>Lift due to pitch rate</description>
        <product>
          <property>aero/qbar-psf</property>
          <property>metrics/Sw-sqft</property>
          <property>velocities/q-aero-rad_sec</property>
          <property>aero/ci2vel</property>
          <value> 7.3210 </value>
        </product>
      </function>

      <function name="aero/force/Lift_alpha_rate">
        <description>Lift due to alpha rate</description>
        <product>
           <property>aero/qbar-psf</property>
           <property>metrics/Sw-sqft</property>
           <property>aero/alphadot-rad_sec</property>
           <property>aero/ci2vel</property>
           <value> 3.5324 </value>
        </product>
      </function>

    <function name="aero/force/Lift_elevator">
       <description>Lift due to Elevator Deflection</description>
       <product>
           <property>aero/qbar-psf</property>
           <property>metrics/Sw-sqft</property>
           <property>fcs/elevator-pos-rad</property>
           <value> 0.4559 </value>
       </product>
    </function>

    <function name="aero/force/Lift_flap">
       <description>Delta Lift due to flaps</description>
       <product>
           <property>aero/qbar-psf</property>
           <property>metrics/Sw-sqft</property>
           <property>aero/function/kCLge</property>
           <property>fcs/flap-pos-deg</property>
           <value> 0.0092 </value>
       </product>
    </function>

    <function name="aero/coefficient/Lift_speedbrake">
       <description>Delta Lift due to speedbrake</description>
       <product>
           <property>aero/qbar-psf</property>
           <property>metrics/Sw-sqft</property>
           <property>aero/function/kCLge</property>
           <property>fcs/speedbrake-pos-norm</property>
           <value> 0.018 </value>	<!-- DSTO -->
       </product>
    </function>
  </axis>

  <axis name="DRAG">
    <!-- CD0 is based on fuselage, wing, horizontal- en vertical tail -->
    <!-- Antennas, struts and wires are not taken into account        -->
    <!-- CD for gear (fixed and retractable) is defined below         -->
    <function name="aero/force/Drag_minimum">
       <description>Minimum drag</description>
       <product>
          <property>aero/qbar-psf</property>
          <property>metrics/Sw-sqft</property>
          <value> 0.0139 </value>
       </product>
    </function>

    <function name="aero/force/Drag_alpha">
       <description>Drag due to alpha</description>
       <product>
          <property>aero/qbar-psf</property>
          <property>metrics/Sw-sqft</property>
          <table>
            <independentVar lookup="row">aero/alpha-rad</independentVar>
            <tableData>
             -1.57    1.4094
             -0.32    0.0720
              0.00    0.0000
              0.32    0.0720
              1.57    1.4094
            </tableData>
          </table>
       </product>
    </function>

    <function name="aero/force/Drag_induced">
       <description>Induced drag</description>
         <product>
           <property>aero/qbar-psf</property>
           <property>metrics/Sw-sqft</property>
           <property>aero/cl-squared</property>
           <value> 0.0527 </value>
         </product>
    </function>

    <function name="aero/force/Drag_mach">
       <description>Drag due to mach</description>
        <product>
          <property>aero/qbar-psf</property>
          <property>metrics/Sw-sqft</property>
          <table>
            <independentVar lookup="row">velocities/mach</independentVar>
            <tableData>
                0.00    0.0000
                0.75    0.0000
                1.10    0.0230
                1.80    0.0150
            </tableData>
          </table>
        </product>
    </function>

    <function name="aero/force/Drag_beta">
       <description>Drag due to sideslip</description>
       <product>
          <property>aero/qbar-psf</property>
          <property>metrics/Sw-sqft</property>
          <table>
            <independentVar lookup="row">aero/beta-rad</independentVar>
            <tableData>
              -1.57    1.2300
              -0.26    0.0500
               0.00    0.0000
               0.26    0.0500
               1.57    1.2300
            </tableData>
          </table>
       </product>
    </function>

    <function name="aero/force/Drag_elevator">
       <description>Drag due to Elevator Deflection</description>
       <product>
           <property>aero/qbar-psf</property>
           <property>metrics/Sw-sqft</property>
           <abs><property>fcs/elevator-pos-rad</property></abs>
           <value> 0.0400 </value>
       </product>
    </function>

    <function name="aero/force/Drag_gear">
       <description>Drag due to gear</description>
         <product>
           <property>aero/qbar-psf</property>
           <property>metrics/Sw-sqft</property>
           <property>gear/gear-pos-norm</property>
           <value> 0.0300 </value>
         </product>
    </function>

    <function name="aero/force/Drag_flap">
       <description>Drag due to flaps</description>
         <product>
           <property>aero/qbar-psf</property>
           <property>metrics/Sw-sqft</property>
           <property>aero/function/kCDge</property>
           <property>fcs/flap-pos-deg</property>
           <value> 0.0012 </value>
         </product>
    </function>

    <function name="aero/coefficient/Drag_speedbrake">
       <description>Drag due to speedbrakes</description>
         <product>
           <property>aero/qbar-psf</property>
           <property>metrics/Sw-sqft</property>
           <property>aero/function/kCDge</property>
           <property>fcs/speedbrake-pos-norm</property>
           <value> 0.03 </value>
         </product>
    </function>
  </axis>

  <axis name="SIDE">
    <function name="aero/force/Side_beta">
       <description>Side force due to beta</description>
       <product>
           <property>aero/qbar-psf</property>
           <property>metrics/Sw-sqft</property>
           <property>aero/beta-rad</property>
          <table>
            <independentVar lookup="row">fcs/flap-pos-deg</independentVar>
            <tableData>		<!-- DSTO -->
              0.0    -0.7563
             23.0    -0.9397
             50.0    -1.3121
            </tableData>
           </table>
       </product>
    </function>

    <function name="aero/force/Side_roll_rate">
       <description>Side force due to roll rate</description>
       <product>
           <property>aero/qbar-psf</property>
           <property>metrics/Sw-sqft</property>
           <property>aero/bi2vel</property>
           <property>velocities/p-aero-rad_sec</property>
           <table>
             <independentVar lookup="row">aero/Re</independentVar>
             <tableData>
                 3163257   0.3715
                 3479583   0.0326
                 4744886   0.0145
                 6316989   0.0082
             </tableData>
           </table>
       </product>
    </function>

    <function name="aero/force/Side_yaw_rate">
       <description>Side force due to yaw rate</description>
       <product>
           <property>aero/qbar-psf</property>
           <property>metrics/Sw-sqft</property>
           <property>aero/bi2vel</property>
           <property>velocities/r-aero-rad_sec</property>
           <value> 0.5636 </value>
       </product>
    </function>

    <function name="aero/force/Side_rudder">
       <description>Side force due to rudder</description>
       <product>
           <property>aero/qbar-psf</property>
           <property>metrics/Sw-sqft</property>
           <property>fcs/rudder-pos-rad</property>
           <value> 0.1937 </value>	<!-- DSTO -->
       </product>
    </function>

    <function name="aero/force/Side_rudder_speedbrake">
       <description>Side force due to speedbrake and rudder</description>
       <product>
           <property>aero/qbar-psf</property>
           <property>metrics/Sw-sqft</property>
           <property>fcs/rudder-pos-rad</property>
           <property>fcs/speedbrake-pos-norm</property>
           <value> -0.0773 </value>	<!-- DSTO -->
       </product>
    </function>

    <function name="aero/force/Delta_Side_rudder_gear">
       <description>Side force due to rudder and gear</description>
       <product>
           <property>aero/qbar-psf</property>
           <property>metrics/Sw-sqft</property>
           <property>fcs/rudder-pos-rad</property>
           <property>gear/gear-pos-norm</property>
           <value> 0.0590 </value>	<!-- DSTO -->
       </product>
    </function>

    <function name="aero/force/Side_beta_gear">
       <description>Side force due to gear and beta</description>
       <product>
           <property>aero/qbar-psf</property>
           <property>metrics/Sw-sqft</property>
           <property>aero/beta-rad</property>
           <property>gear/gear-pos-norm</property>
           <value> -0.2350 </value>	<!-- DSTO -->
       </product>
    </function>
  </axis>

  <axis name="PITCH">
<!--
    <function name="aero/moment/Pitch_propwash">
      <description>Pitch moment due to propeller induced velocity</description>
      <product>
          <property>aero/function/qbar-propwash-psf</property>
          <property>metrics/Sw-sqft</property>
          <property>metrics/bw-ft</property>
          <table>
            <independentVar lookup="row">aero/alpha-rad</independentVar>
            <independentVar lookup="column">fcs/flap-pos-deg</independentVar>
            <tableData>
                     0.0     60.0
              -0.04  0.000   0.000
               0.00  0.032   0.085
               0.34  0.145   0.386
               0.45  0.000   0.000
            </tableData>
          </table>
      </product>
    </function>
-->

    <function name="aero/moment/Pitch_alpha">
       <description>Pitch moment due to alpha</description>
       <product>
           <property>aero/qbar-psf</property>
           <property>metrics/Sw-sqft</property>
           <property>metrics/cbarw-ft</property>
           <property>aero/alpha-rad</property>
           <table>
            <independentVar lookup="row">fcs/flap-pos-deg</independentVar>
            <tableData>
              0.0     -0.3741	<!-- DSTO -->
             50.0     -0.5730
            </tableData>
           </table>
       </product>
    </function>

    <function name="aero/moment/Pitch_elevator">
       <description>Pitch moment due to elevator</description>
       <product>
          <property>aero/function/qbar-induced-psf</property>
          <property>metrics/Sw-sqft</property>
          <property>metrics/cbarw-ft</property>
          <property>fcs/elevator-pos-rad</property>
          <table>
            <independentVar lookup="row">fcs/flap-pos-deg</independentVar>
            <independentVar lookup="column">gear/gear-pos-norm</independentVar>
            <tableData>		<!-- DSTO -->
                      0.0       1.0
              0.0    -1.1058   -1.3235
             23.0    -1.4897   -1.9367
             50.0    -1.3522   -1.3293
            </tableData>
          </table>
       </product>
    </function>

    <function name="aero/moment/Pitch_damp">
       <description>Pitch moment due to pitch rate</description>
       <product>
           <property>aero/qbar-psf</property>
           <property>metrics/Sw-sqft</property>
           <property>metrics/cbarw-ft</property>
           <property>aero/ci2vel</property>
           <property>velocities/q-aero-rad_sec</property>
           <value> -38.3644 </value>
       </product>
    </function>

    <function name="aero/moment/Pitch_alphadot">
       <description>Pitch moment due to alpha rate</description>
       <product>
           <property>aero/qbar-psf</property>
           <property>metrics/Sw-sqft</property>
           <property>metrics/cbarw-ft</property>
           <property>aero/ci2vel</property>
           <property>aero/alphadot-rad_sec</property>
           <value> -18.5112 </value>
       </product>
    </function>

    <function name="aero/moment/Pitch_alpha_gear">
       <description>Pitch moment due to gear and alpha</description>
       <product>
           <property>aero/qbar-psf</property>
           <property>metrics/Sw-sqft</property>
           <property>metrics/cbarw-ft</property>
           <property>aero/alpha-rad</property>
           <property>gear/gear-pos-norm</property>
           <value> -0.1460 </value>	<!-- DSTO -->
       </product>
    </function>

    <function name="aero/moment/Pitch_speedbrake">
       <description>Pitch moment due to speedbrake</description>
       <product>
          <property>aero/qbar-psf</property>
          <property>metrics/Sw-sqft</property>
          <property>metrics/cbarw-ft</property>
          <property>aero/alpha-rad</property>
          <property>fcs/speedbrake-pos-norm</property>
          <value> 0.014 </value>	<!-- DSTO -->
       </product>
    </function>
  </axis>

  <axis name="ROLL">
<!--
    <function name="aero/moment/Roll_differential_propwash">
       <description>Roll moment due to differential propwash</description>
       <product>
           <property>aero/function/qbar-propwash-psf</property>
           <property>metrics/Sw-sqft</property>
           <property>metrics/bw-ft</property>
           <property>aero/alpha-rad</property>
           <value> 0.0529 </value>
       </product>
    </function>
-->

    <function name="aero/moment/Roll_beta">
       <description>Roll moment due to beta</description>
       <product>
           <property>aero/qbar-psf</property>
           <property>metrics/Sw-sqft</property>
           <property>metrics/bw-ft</property>
           <property>aero/beta-rad</property>
           <table>
             <independentVar lookup="row">aero/alpha-rad</independentVar>
             <independentVar lookup="column">aero/Re</independentVar>
             <tableData>                         <!-- DSTO -->
                          3163257  3479583  4744886  6316989
                 -0.0349  -0.6536  -0.1784  -0.1530  -0.0802
                  0.3491  -0.7345  -0.1862  -0.1612  -0.0802
             </tableData>
           </table>
       </product>
    </function>

    <function name="aero/moment/Roll_damp">
       <description>Roll moment due to roll rate</description>
       <product>
           <property>aero/qbar-psf</property>
           <property>metrics/Sw-sqft</property>
           <property>metrics/bw-ft</property>
           <property>aero/bi2vel</property>
           <property>velocities/p-aero-rad_sec</property>
           <value> -0.4750 </value>	<!-- DSTO -->
       </product>
    </function>

    <function name="aero/moment/Roll_yaw">
       <description>Roll moment due to yaw rate</description>
       <product>
           <property>aero/qbar-psf</property>
           <property>metrics/Sw-sqft</property>
           <property>metrics/bw-ft</property>
           <property>aero/bi2vel</property>
           <property>velocities/r-aero-rad_sec</property>
           <table>
            <independentVar lookup="row">fcs/flap-pos-deg</independentVar>
            <tableData>		<!-- DSTO -->
              0.0     0.1370
             23.0     0.1100
             50.0     0.1050
            </tableData>
           </table>
       </product>
    </function>

    <function name="aero/moment/Roll_aileron">
       <description>Roll moment due to aileron</description>
       <product>
          <property>aero/qbar-psf</property>
          <property>metrics/Sw-sqft</property>
          <property>metrics/bw-ft</property>
          <property>fcs/left-aileron-pos-rad</property>
           <table>
            <independentVar lookup="row">velocities/mach</independentVar>
            <tableData>
              0.0    0.0991	<!-- DSTO -->
              2.0    0.0450
            </tableData>
          </table>
       </product>
    </function>

    <function name="aero/moment/Roll_rudder">
       <description>Roll moment due to rudder</description>
       <product>
           <property>aero/qbar-psf</property>
           <property>metrics/Sw-sqft</property>
           <property>metrics/bw-ft</property>
           <property>fcs/rudder-pos-rad</property>
           <value> 0.0100 </value>
       </product>
    </function>

    <function name="aero/moment/Roll_yaw_gear">
       <description>Roll moment due to gear and yaw rate</description>
       <product>
           <property>aero/qbar-psf</property>
           <property>metrics/Sw-sqft</property>
           <property>metrics/bw-ft</property>
           <property>aero/bi2vel</property>
           <property>velocities/r-aero-rad_sec</property>
           <property>gear/gear-pos-norm</property>
           <value> 0.0490 </value>	<!-- DSTO -->
       </product>
    </function>
  </axis>

  <axis name="YAW">
    <!-- Stall initiator -->
    <function name="aero/moment/Yaw_alpha">
       <description>Yaw moment due to alpha</description>
       <product>
           <property>aero/qbar-psf</property>
           <property>metrics/Sw-sqft</property>
           <property>metrics/bw-ft</property>
           <property>aero/alpha-rad</property>
           <property>fcs/gear-no-wow</property>
           <table>
             <independentVar lookup="row">aero/beta-rad</independentVar>
             <independentVar lookup="column">aero/Re</independentVar>
             <tableData>
                          3163257  3479583
                 -0.3491  -1.0000   0.0000
                  0.3491   1.0000   0.0000
             </tableData>
           </table>
       </product>
    </function>

<!--
    <function name="aero/coefficient/Cnspw">
       <description>Yaw_moment_due_to_spiraling_propwash</description>
       <product>
           <property>aero/function/qbar-propwash-psf</property>
           <property>metrics/Sw-sqft</property>
           <property>metrics/bw-ft</property>
           <value>-0.0125</value>
       </product>
    </function>
-->

    <function name="aero/moment/Yaw_beta">
       <description>Yaw moment due to beta</description>
       <product>
           <property>aero/qbar-psf</property>
           <property>metrics/Sw-sqft</property>
           <property>metrics/bw-ft</property>
           <property>aero/beta-rad</property>
           <table>
            <independentVar lookup="row">fcs/flap-pos-deg</independentVar>
            <tableData>
              0.0     0.0825            <!-- DSTO -->
             23.0     0.1069
             50.0     0.1249
            </tableData>
           </table>
       </product>
    </function>

    <function name="aero/moment/Yaw_roll_rate">
       <description>Yaw moment due to roll rate</description>
       <product>
           <property>aero/qbar-psf</property>
           <property>metrics/Sw-sqft</property>
           <property>metrics/bw-ft</property>
           <property>aero/bi2vel</property>
           <property>velocities/p-rad_sec</property>
           <table>
             <independentVar lookup="row">aero/Re</independentVar>
             <tableData>
                 3163257  -0.2232
                 3479583  -0.0196
                 4744886  -0.0087
                 6316989  -0.0049
             </tableData>
           </table>
       </product>
    </function>

    <function name="aero/moment/Yaw_damp">
       <description>Yaw moment due to yaw rate</description>
       <product>
           <property>aero/qbar-psf</property>
           <property>metrics/Sw-sqft</property>
           <property>metrics/bw-ft</property>
           <property>aero/bi2vel</property>
           <property>velocities/r-aero-rad_sec</property>
           <table>
            <independentVar lookup="row">fcs/flap-pos-deg</independentVar>
            <tableData>		<!-- DSTO -->
              0.0    -0.2110
             23.0    -0.193
             50.0    -0.1390
            </tableData>
           </table>
       </product>
    </function>

    <function name="aero/moment/Yaw_rudder">
       <description>Yaw moment due to rudder</description>
       <product>
           <property>aero/function/qbar-induced-psf</property>
           <property>metrics/Sw-sqft</property>
           <property>metrics/bw-ft</property>
           <property>fcs/rudder-pos-rad</property>
           <value>-0.1089</value>	<!-- DSTO -->
       </product>
    </function>

    <function name="aero/moment/Yaw_aileron">
       <description>Adverse yaw</description>
       <product>
           <property>aero/qbar-psf</property>
           <property>metrics/Sw-sqft</property>
           <property>metrics/bw-ft</property>
           <property>fcs/left-aileron-pos-rad</property>
           <value> -0.0030 </value>
       </product>
    </function>

    <function name="aero/moment/Delta_Yaw_beta_gear">
       <description>Yaw moment due to gear and beta</description>
       <product>
           <property>aero/qbar-psf</property>
           <property>metrics/Sw-sqft</property>
           <property>metrics/bw-ft</property>
           <property>aero/beta-rad</property>
           <property>gear/gear-pos-norm</property>
           <property>fcs/gear-no-wow</property>
           <value> 0.0057 </value>      <!-- DSTO -->
       </product>
    </function>

   <function name="aero/moment/Delta_Yaw_roll_rate_gear">
       <description>Yaw moment due to gear and roll rate</description>
       <product>
           <property>aero/qbar-psf</property>
           <property>metrics/Sw-sqft</property>
           <property>metrics/bw-ft</property>
           <property>aero/bi2vel</property>
           <property>velocities/p-rad_sec</property>
           <property>gear/gear-pos-norm</property>
           <property>fcs/gear-no-wow</property>
           <value> -0.0155 </value>     <!-- DSTO -->
       </product>
    </function>

    <function name="aero/moment/Delta_Yaw_damp_gear">
       <description>Yaw moment due to gear and yaw rate</description>
       <product>
           <property>aero/qbar-psf</property>

           <property>metrics/Sw-sqft</property>
           <property>metrics/bw-ft</property>
           <property>aero/bi2vel</property>
           <property>velocities/r-aero-rad_sec</property>
           <property>gear/gear-pos-norm</property>
           <property>fcs/gear-no-wow</property>
           <value> 0.0120 </value>      <!-- DSTO -->
       </product>
    </function>

    <function name="aero/moment/Delta_Yaw_roll_rate_speedbrake">
       <description>Yaw moment due to speedbrake and roll rate</description>
       <product>
           <property>aero/qbar-psf</property>
           <property>metrics/Sw-sqft</property>
           <property>metrics/bw-ft</property>
           <property>aero/bi2vel</property>
           <property>velocities/p-rad_sec</property>
           <property>fcs/speedbrake-pos-norm</property>
           <value> 0.0210 </value>      <!-- DSTO -->
       </product>
    </function>
  </axis>
</aerodynamics>
